units			 metal
boundary 		 p p p
atom_style		 full
neighbor		 1.0 bin
neigh_modify		 delay 1
pair_style		 hybrid/overlay vashishta lj/cut/tip4p/long 3 4 1 1 0.1546 10
kspace_style		 pppm/tip4p 1.0e-4
bond_style		 harmonic
angle_style		 harmonic


read_data		 crackSiO_Q3_b2.data
molecule		 h2omol H2O_Q3_b2.mol
lattice		 sc 3.0
create_atoms		 0 box mol h2omol 55755
lattice none		 1

group SiO type		 1 2
group H2O type		 3 4


pair_coeff 		 * * vashishta SiO.1990.vashishta Si O NULL NULL
pair_coeff		 * * lj/cut/tip4p/long 0 0

# epsilonSi = 0.00403, sigmaSi = 3.69
# epsilonO = 0.0023, sigmaO = 3.091

pair_coeff		 1 3 lj/cut/tip4p/long 0.0057 4.42
pair_coeff		 2 3 lj/cut/tip4p/long 0.0043 3.12
pair_coeff		 3 3 lj/cut/tip4p/long 0.008 3.1589
pair_coeff 		 4 4 lj/cut/tip4p/long 0.0 0.0
bond_coeff 		 1 0 0.9572
angle_coeff		 1 0 104.52


variable		 oxygen atom "type==3"
group			 oxygen dynamic all var oxygen
variable		 nO equal count(oxygen)
fix			 myat1 all ave/time 100 10 1000 v_nO file numbermolecule.dat

fix			 shak H2O shake 1.0e-4 200 0 b 1 a 1 mol h2omol

delete_atoms		 overlap 2 H2O SiO mol yes
dump			 dmp all atom 1000 dump.lammpstrj


compute_modify 	 thermo_temp dynamic yes
compute		 ctH2O H2O temp
compute_modify		 ctH2O dynamic yes
fix			 mynvt1 H2O nvt temp 300 300 0.1
fix_modify		 mynvt1 temp ctH2O
compute		 ctSiO SiO temp
fix			 mynvt2 SiO nvt temp 300 300 0.1
fix_modify		 mynvt2 temp ctSiO
timestep		 0.001
thermo			 1000
run			 5000

variable		 tfac equal 5.0/3.0
variable		 xlo equal xlo+0.2
variable		 xhi equal xhi-0.2
variable		 ylo equal ylo+0.2
variable		 yhi equal yhi-0.2
variable		 zlo equal zlo+0.2
variable		 zhi equal zhi-0.2
region			 system block ${xlo} ${xhi} ${ylo} ${yhi} ${zlo} ${zhi}
fix 			 fgcmc H2O gcmc 100 100 0 0 585855 300 -0.5 0.1 mol h2omol tfac_insert ${tfac} group H2O shake shak full_energy pressure 10000 region system
run 			 100000
write_data		 SiOwithwaterincrack.data
